# Header
Tamb_max := 85 °C
Usys_max := 25 V
U_Bat := 3.6 V
Tamb_min := -25 °C
Usys_min := 2.5 V
I_Bat_MAX := 4 A
T_max := 125 °C
ΔT_max := T_max - Tamb_max = 40 K
# LED Driver TL3477
# Maximale Ausgangsspannung:
Uout_max := 40 V
R8L := 680 kΩ
Uout_max == 1.235*V*(1 + R8L/R10L) solve, R10L → 21.6638720495*kΩ
# Eingangsstrom-Begrenzung:
Iin_max := 3 A
R4L := 0.1 V/Iin_max = 0.0333333 Ω
# LED-Strom:
Iout := 1 A
R5L := 0.1 V/Iout = 0.1 Ω  # .. Annahme: IADJ2(Pin9) > 650mV
# Frequenzkompensation:
R18L := 1 kΩ
C8L := 4.7 nF
# Schaltfrequenz:
R13L := 18 kΩ  # .. ca. 1MHz
# Stromwerte: (aus SPICE Simulation)
I_CRMS := 1.6 A
I_Cavg := 0 A
I_Cpeak := 3.8 A
I_DRMS := 1.7 A
I_Davg := 1 A
I_Dpeak := 4 A
I_LRMS := 3 A
I_Lavg := 3 A
I_Lpeak := 4.2 A
# LED-Stromeinstellung:
f_modmax := 1 kHz  # .. max LED-Strommodulationsrate
U_Iadj2max := 0.625 V  # .. ergibt max. LED-Strom
U_adcmin := Usys_min  # .. min. DAC-Spannung, soll max LED Strom liefern
R11L := 33 kΩ
U_adcmin/(R9L + R11L) == U_Iadj2max/R11L solve, R9L → 99.0*kΩ
f_modmax == 1/(2*π*R11L*C6L) solve, C6L → 1/(66*π*kΩ*kHz) = 4.82288 nF
# Battery Management - LTC4015
# Schaltfrequenz:
R_T := 100 kΩ
f_OSC := 47.65 MHz*Ω/(R_T/1000) = 476500 1/s
# Eingangsstrom MAX:
I_IN_MAX := 3.2 A
R1B := I_IN_MAX == 0.032 V/R_SNSI solve, R_SNSI → 0.01*V/A  # .. R1B
P_R1Bmax := I_IN_MAX^2*R1B = 0.1024 W
# Ladestrom MAX:
I_CHG_MAX := 3.2 A
R8B := I_CHG_MAX == 0.032 V/R_SNSB solve, R_SNSB → 0.01*V/A  # .. R8B
P_R8Bmax := I_CHG_MAX^2*R8B = 0.1024 W
# Induktivität:
L := U_Bat*(1 - U_Bat/Usys_max)/(0.25*f_OSC*I_CHG_MAX) = 8.08395e-6 H  # .. liefert 25% Ripple-Strom.
I_L_MAX := 1.6*I_CHG_MAX = 5.12 A
ΔI_L := 1/L*(Usys_max - U_Bat)*1/f_OSC*U_Bat/Usys_max = 0.8 A  # .. aus Tietze Schenk, Halbleiterschaltungstechnik S. 944
# Induktivität gewählt: Vishay IHLP5050CEER100M01
L_@5.5A := 9 μH
ΔT_@5.5A := 25 K
# Kapazität Csys und Cbat
Csys := 22 μF  # .. bei max Eingangsspannung liefert X7R 30% der Nennkapazität. Cnom = 3*Csys
ESR_CSYS := 0.003 Ω
ΔUsys := U_Bat/Usys_max*(1 - U_Bat/Usys_max)*I_CHG_MAX/(Csys*f_OSC) + I_CHG_MAX*ESR_CSYS = 0.0472271 V
I_RMS := I_CHG_MAX/2 = 1.6 A  # .. worst case
C_Bat := 22 μF
ESR_CBAT := 0.003 Ω
ΔU_Bat := ΔI_L*(1/(8*C_Bat*f_OSC) + ESR_CBAT) = 0.0119393 V
# Power MOSFET für Buck Converter: NMOS Typ: FDMC8327L
U_GS := 4.5 V
I_D := 10 A
r_DSon := 0.0125 Ω  # .. gew. Parameter
δ := 0.005 1/K  # .. Temp.-Koeff des MOSFETs (Richtwert)
R_th := 53 K/W  # .. Kühlfläche 1x1 Zoll
# Leitverluste
P_COND_TOP := (U_Bat/Usys_min*I_CHG_MAX^2*r_DSon)*(1 + δ*ΔT_max) = 0.221184 W
P_COND_BOT := ((1 - U_Bat/Usys_max)*I_CHG_MAX^2*r_DSon)*(1 + δ*ΔT_max) = 0.131482 W
# Schaltverluste
k := 1.2*1/A  # .. wegen Miller-Plateau
C_RSS := 35*pF
P_TRAN := k/2*Usys_max^2*I_CHG_MAX*C_RSS*f_OSC = 0.020013 W
ΔT_MOS := (P_COND_TOP + P_TRAN)*R_th = 12.7834 K
T_MOS_MAX := Tamb_max + ΔT_MOS = 97.7834 °C
# Gate Umladeverluste
Q_G := 14 nC
P_Gate := (2*Q_G)*f_OSC*Usys_max = 0.33355 W
# Gate Driver
C_ISS := 1850*pF
C13B_min := 20*C_ISS = 37 nF
C25B_min := 10*C13B_min = 370 nF
DRVCC := 5 V
U_BR_R5B := Usys_max + DRVCC = 30 V  # .. R5B: fast switching PN Diode
I_R5B := Q_G*f_OSC = 0.006671 A  # .. Verluste vernachlässigt
# Cycle Skipping
ton_min := 85 ns
ton := U_Bat/(Usys_max*f_OSC) = 302.204 ns  # .. Cycle Skipping beginnt für ton < ton_min
# Ideal Diode MOSFET
U_Freg := 15 mV  # .. "Flusspannung" für Regelung der "Ideal Diode"
r_DSonPMOS := 0.034 Ω  # .. gilt für PMOS K2B
R_thPMOS := 36 K/W  # .. Kühlfläche 1x1 Zoll
# K1B Spannungsabfall
I_IN_MAX*r_DSon = 0.04 V
# K2B Spannungsabfall
I_Bat_MAX*r_DSonPMOS = 0.136 V
# .. K1B und K2B keine Regelung der Flusspannung möglich (nicht notwendig).
# Verlustleistung
P_K1B := I_IN_MAX^2*r_DSon = 0.128 W
P_K2B := I_Bat_MAX^2*r_DSonPMOS = 0.544 W
ΔT_maxK1B := P_K1B*R_th = 6.784 K
ΔT_maxK2B := P_K2B*R_thPMOS = 19.584 K
# Input Undervoltage Current Limit - UVCL
R2B := 294 kΩ
R4B := 10 kΩ  # .. Werte vorgegeben wenn MPPT verwendet wird.
# Zellenauswahl
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# Chemieauswahl
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