## LED Box - Dimensionerung
# Gerald Ebmer
# 13.12.2017
# Rev 1.0
## Header
Tamb_max := 85 °C
Tamb_min := -25 °C
Usys_min := 2.5 V
Usys_max := 25 V
## LED Driver LT3477
## Maximale Ausgangsspannung:
Uout_max := 40 V
R8L := 680 kΩ
Uout_max == 1.235 V*(1 + R8L/R10L) solve, R10L → 21.6638720495*kΩ
## Eingangsstrom-Begrenzung:
Iin_max := 3 A
R4L := 0.1 V/Iin_max = 0.0333333 Ω
## LED-Strom:
# Annahme: IADJ2 (Pin9) > 650mV
Iout := 1 A
R5L := 0.1 V/Iout = 0.1 Ω
## Frequenzkompensation (Richtwerte):
R18L := 1 kΩ
C8L := 4.7 nF
## Schaltfrequenz
R13L := 18 kΩ  # ...ca. 1MHz Schaltfrequenz
## Ausgangskondensator
I_CRMS := 1.6 A
I_Cavg := 0 A
I_Cpeak := 3.8 A  # ... aus SPICE Simulation
## Diode:
I_DRMS := 1.7 A
I_Davg := 1 A
I_Dpeak := 4 A  # ... aus SPICE Simulation
## Induktivität
I_LRMS := 3 A
I_Lavg := 3 A
I_Lpeak := 4.2 A  # ... aus SPICE Simulation
# LED-Strom Einstellung:
f_modmax := 1 kHz  # .. max. Modulationsfrequenz
U_Iadj2max := 0.625 V  # .. liefert max. LED-Strom
U_adcmin := Usys_min  # .. min. DAC Spannung soll max. LED Strom liefern können.
R11L := 33 kΩ
U_adcmin/(R9L + R11L) == U_Iadj2max/R11L solve, R9L → 99.0*kΩ
f_modmax == 1/(2*π*R11L*C6L) solve, C6L → 1/(66*π*kHz*kΩ) = 4.82288 nF
